// COMSOL Multiphysics 6.3.0.290 model "Untitled.mph"
// Outline of the model tree

Parameters
  w_ch = 200e-6[m]  // Channel width
  h_ch = 300e-6[m]  // Channel height
  L = 5[mm]  // Channel lenght
  t_f = 100e-6[m]  // Fin thickness
  u_in = 1[m/s]  // Inlet velocity
  q_base = 100e3[W/m^2]  // Base heat flux
  T_in = 350[K]

Geometry
  geom1 "Geometry 1" (3D, length unit m)
    blk1: Block | size = {w_ch/2 + t_f/2, L, h_ch + t_f}
    blk2: Block | size = {w_ch/2, L, h_ch}; pos = {0, 0, t_f/2}
    dif1: Difference | input = blk1; input2 = blk2; keepsubtract = on
    fin: Finalize "Form Union"

Materials
  mat1: Common "Water, liquid" on domains 2
    def: def "Basic"
      thermalexpansioncoefficient = alpha_p(T)
      bulkviscosity = muB(T)
      dynamicviscosity = eta(T)
      ratioofspecificheat = gamma_w(T)
      electricconductivity = 5.5e-6[S/m]
      heatcapacity = Cp(T)
      density = rho(T)
      thermalconductivity = k(T)
      soundspeed = cs(T)
      eta: Piecewise
        arg = T
        pieces = 
          {273.15, 413.15, 1.3799566804-0.021224019151*T^1+1.3604562827E-4*T^2-4.6454090319E-7*T^3+8.9042735735E-10*T^4-9.0790692686E-13*T^5+3.8457331488E-16*T^6}
          {413.15, 553.75, 0.00401235783-2.10746715E-5*T^1+3.85772275E-8*T^2-2.39730284E-11*T^3}
        argunit = K
        fununit = Pa*s
      Cp: Piecewise | arg = T; pieces = {273.15, 553.75, 12010.1471-80.4072879*T^1+0.309866854*T^2-5.38186884E-4*T^3+3.62536437E-7*T^4}; argunit = K; fununit = J/(kg*K)
      rho: Piecewise
        arg = T
        smooth = contd1
        pieces = 
          {273.15, 293.15, 6.3092789034e-05*T^3-0.0603676398829*T^2+18.9229382407066*T-950.704055329848}
          {293.15, 373.15, 1.0335053319e-05*T^3-0.0133950656345*T^2+4.96928883266*T+432.257114008512}
        argunit = K
        fununit = kg/m^3
      k: Piecewise | arg = T; pieces = {273.15, 553.75, -0.869083936+0.00894880345*T^1-1.58366345E-5*T^2+7.97543259E-9*T^3}; argunit = K; fununit = W/(m*K)
      cs: Interpolation
        funcnametable = {cs, 1}
        table = {{273, 1403}, {278, 1427}, {283, 1447}, {293, 1481}, {303, 1507}, {313, 1526}, {323, 1541}, {333, 1552}, {343, 1555}, {353, 1555}, {363, 1550}, {373, 1543}}
        interp = piecewisecubic
        fununit = m/s
        argunit = K
      an1: Analytic | funcname = alpha_p; expr = -1/rho(T)*d(rho(T),T); args = T; fununit = 1/K; argunit = K
      an2: Analytic | funcname = gamma_w; expr = 1+(T/Cp(T))*(alpha_p(T)*cs(T))^2; args = T; fununit = 1; argunit = K
      an3: Analytic | funcname = muB; expr = 2.79*eta(T); args = T; fununit = Pa*s; argunit = K
  mat2: Common "Aluminum [solid,bulk]" on domains 1
    def: def "Basic"
      thermalconductivity = k_solid_bulk_1(T)
      resistivity = res_solid_1(T)
      thermalexpansioncoefficient = (alpha_solid_1(T)+(Tempref-293[K])*if(abs(T-Tempref)>1e-3,(alpha_solid_1(T)-alpha_solid_1(Tempref))/(T-Tempref),d(alpha_solid_1(T),T)))/(1+alpha_solid_1(Tempref)*(Tempref-293[K]))
      heatcapacity = C_solid_1(T)
      electricconductivity = sigma_solid_1(T)
      HC = HC_solid_1(T)
      VP = VP_solid_1(T)
      density = rho_solid_1(T)
      TD = TD_solid_bulk_1(T)
      k_solid_bulk_1: Piecewise
        arg = T
        pieces = 
          {0.0, 14.0, 3805.9257*T^1+248.253751*T^2-64.8829086*T^3+2.73457966*T^4-0.0187346194*T^5}
          {14.0, 30.0, 17649.5661+3071.71083*T^1-356.155686*T^2+12.1632633*T^3-0.139143056*T^4}
          {30.0, 60.0, 54213.1094-3716.7432*T^1+102.759822*T^2-1.3121209*T^3+0.00641434375*T^4}
          {60.0, 90.0, 16865.6571-727.283333*T^1+12.6041667*T^2-0.100666667*T^3+3.08333333E-4*T^4}
          {90.0, 100.0, 5295.0046-144.833278*T^1+1.56558379*T^2-0.00751036234*T^3+1.34350403E-5*T^4}
          {100.0, 207.0, 5666.70732-182.039979*T^1+2.55413737*T^2-0.0190491433*T^3+7.93330491E-5*T^4-1.74616787E-7*T^5+1.5857953E-10*T^6}
          {207.0, 425.0, 464.138175-2.83651472*T^1+0.0125251645*T^2-2.33826954E-5*T^3+1.56955919E-8*T^4}
          {425.0, 933.5, 265.070681-0.150430674*T^1+3.85488463E-4*T^2-5.21464711E-7*T^3+2.24638309E-10*T^4}
        argunit = K
        fununit = W/(m*K)
      res_solid_1: Piecewise
        arg = T
        pieces = 
          {1.0, 10.0, 9.712962963E-13+3.887962963E-14*T^1-1.3375E-14*T^2+3.342592593E-15*T^3-1.435185185E-16*T^4}
          {10.0, 20.0, 2.187820518E-12-5.743739316E-13*T^1+1.039617521E-13*T^2-6.728632479E-15*T^3+1.818376068E-16*T^4}
          {20.0, 50.0, -9.909999995E-11+1.592783333E-11*T^1-8.841333334E-13*T^2+1.891166667E-14*T^3-5.966666667E-17*T^4}
          {50.0, 100.0, 2.838127706E-10-1.237954455E-11*T^1-2.194611742E-13*T^2+1.422266414E-14*T^3-6.65625E-17*T^4}
          {100.0, 933.16, -6.834578951E-9+1.105722748E-10*T^1+2.599783574E-14*T^2-7.104984407E-17*T^3+6.083670851E-20*T^4}
        argunit = K
        fununit = ohm*m
      alpha_solid_1: Piecewise
        arg = T
        pieces = 
          {10.0, 137.0, 1.43109188E-5+3.37038626E-8*T^1+8.16435956E-10*T^2-1.08888719E-11*T^3+5.23223423E-14*T^4-8.82682652E-17*T^5}
          {137.0, 247.0, 2.07834478E-5-4.08338871E-8*T^1+2.32930107E-10*T^2+1.49187457E-12*T^3-1.07271913E-14*T^4+1.67112321E-17*T^5}
          {247.0, 933.16, 7.73307064E-6+1.51327401E-7*T^1-5.79889205E-10*T^2+1.08298998E-12*T^3-9.44189288E-16*T^4+3.12958753E-19*T^5}
        argunit = K
        fununit = 1/K
      C_solid_1: Piecewise
        arg = T
        pieces = 
          {10.0, 26.0, 10.01479173-3.90760773*T^1+0.648758442*T^2-0.0548161053*T^3+0.002628928063*T^4-6.454841189E-5*T^5+6.542348084E-7*T^6}
          {26.0, 108.0, -71.83815199+9.715525148*T^1-0.5558166601*T^2+0.01723557851*T^3-2.256783472E-4*T^4+1.363704325E-6*T^5-3.14875506E-9*T^6}
          {108.0, 300.0, -892.25551+28.02101309*T^1-0.2196890566*T^2+0.001033570244*T^3-2.845637264E-6*T^4+4.156067863E-9*T^5-2.458886642E-12*T^6}
          {300.0, 933.16, 663.1257541+1.177699488*T^1-0.001545492309*T^2+1.04234523E-6*T^3}
        argunit = K
        fununit = J/(kg*K)
      sigma_solid_1: Piecewise
        arg = T
        pieces = 
          {1.0, 10.0, 1/(-1.435185185E-16*T^4+3.342592593E-15*T^3-1.337500000E-14*T^2+3.887962963E-14*T+9.712962963E-13)}
          {10.0, 20.0, 1/(1.818376068E-16*T^4-6.728632479E-15*T^3+1.039617521E-13*T^2-5.743739316E-13*T+2.187820518E-12)}
          {20.0, 50.0, 1/(-5.966666667E-17*T^4+1.891166667E-14*T^3-8.841333334E-13*T^2+1.592783333E-11*T-9.909999995E-11)}
          {50.0, 100.0, 1/(-6.656250000E-17*T^4+1.422266414E-14*T^3-2.194611742E-13*T^2-1.237954455E-11*T+2.838127706E-10)}
          {100.0, 933.16, 1/(6.083670851E-20*T^4-7.104984407E-17*T^3+2.599783574E-14*T^2+1.105722748E-10*T-6.834578951E-09)}
        argunit = K
        fununit = S/m
      HC_solid_1: Piecewise
        arg = T
        pieces = 
          {10.0, 26.0, 0.270214103-0.1054331181*T^1+0.01750447587*T^2-0.00147902075*T^3+7.093242269E-5*T^4-1.74161297E-6*T^5+1.76522365E-8*T^6}
          {26.0, 108.0, -1.938301091+0.2621394411*T^1-0.01499676718*T^2+4.650417634E-4*T^3-6.089140342E-6*T^4+3.67947882E-8*T^5-8.49581346E-11*T^6}
          {108.0, 300.0, -24.07439208+0.7560489632*T^1-0.005927540288*T^2+2.788727554E-5*T^3-7.677956185E-8*T^4+1.121369451E-10*T^5-6.634444995E-14*T^6}
          {300.0, 933.16, 17.89212652+0.03177609869*T^1-4.169970077E-5*T^2+2.812403777E-8*T^3}
        argunit = K
        fununit = J/(mol*K)
      VP_solid_1: Piecewise | arg = T; pieces = {293.0, 933.16, (exp((-1.734200000e+04/T-7.927000000e-01*log10(T)+1.233981000e+01)*log(10.0)))*1.333200000e+02}; argunit = K; fununit = Pa
      rho_solid_1: Piecewise
        arg = T
        pieces = 
          {10.0, 247.0, 2734.57514-0.0398881851*T^1+0.00187559788*T^2-3.69839365E-5*T^3+2.55112441E-7*T^4-8.1685655E-10*T^5+1.00385922E-12*T^6}
          {247.0, 933.16, 2751.77566-0.179058415*T^1+4.65832302E-5*T^2-1.51653304E-7*T^3+6.83086165E-11*T^4+8.71886752E-16*T^5-2.11179857E-18*T^6}
        argunit = K
        fununit = kg/m^3
      TD_solid_bulk_1: Piecewise
        arg = T
        pieces = 
          {20.0, 74.0, exp(-5807.88202+9180.60153*log(T)^1-6008.76256*log(T)^2+2086.0455*log(T)^3-405.314165*log(T)^4+41.7772226*log(T)^5-1.78390161*log(T)^6)}
          {74.0, 329.0, exp(-6160.54247+7781.80151*log(T)^1-4051.85204*log(T)^2+1114.52801*log(T)^3-171.115377*log(T)^4+13.9200755*log(T)^5-0.469134794*log(T)^6)}
          {329.0, 933.16, exp(63264.98716-60576.1854*log(T)^1+24137.9525*log(T)^2-5124.1508*log(T)^3+611.192838*log(T)^4-38.8356702*log(T)^5+1.02695017*log(T)^6)}
        argunit = K
        fununit = m^2/s
    ThermalExpansion: ThermalExpansion
      alphatan = CTE_solid_1(T)
      dL = (dL_solid_1(T)-dL_solid_1(Tempref))/(1+dL_solid_1(Tempref))
      dL_solid_1: Piecewise
        arg = T
        pieces = 
          {10.0, 25.0, -0.00416732581-3.26820168E-13*T^1-6.40537926E-9*T^2+7.35005611E-10*T^3-3.34650303E-11*T^4+1.0196671E-12*T^5-9.00232037E-15*T^6}
          {25.0, 189.0, -0.00424379768+7.68932463E-6*T^1-2.86497054E-7*T^2+4.90825879E-9*T^3-3.08623048E-11*T^4+8.74528953E-14*T^5-8.97335932E-17*T^6}
          {189.0, 933.16, -0.00226518274-3.66079307E-5*T^1+3.21234948E-7*T^2-8.97205299E-10*T^3+1.35963749E-12*T^4-1.03588624E-15*T^5+3.12958765E-19*T^6}
        argunit = K
      CTE_solid_1: Piecewise
        arg = T
        pieces = 
          {10.0, 27.0, 3.26614079E-8-1.2811084E-8*T^1+2.2050497E-9*T^2-1.3386148E-10*T^3+5.0983621E-12*T^4-5.4014065E-14*T^5}
          {27.0, 79.0, -3.29120927E-6+3.06868839E-7*T^1-1.00481619E-8*T^2+1.72476772E-10*T^3-8.8460608E-13*T^4}
          {79.0, 230.0, -2.28632108E-5+6.67491471E-7*T^1-4.40262199E-9*T^2+1.45535841E-11*T^3-1.91062188E-14*T^4}
          {230.0, 900.0, 1.24556905E-5+5.05077193E-8*T^1-5.80655625E-11*T^2+3.01430546E-14*T^3}
        argunit = K
        fununit = 1/K
    Enu: Enu "Young's modulus and Poisson's ratio"
      E = E(T)
      nu = nu(T)
      E: Piecewise | arg = T; pieces = {0.0, 773.16, 7.659324E10+2007396.0*T^1-186458.4*T^2+419.2175*T^3-0.3495083*T^4}; argunit = K; fununit = Pa
      nu: Piecewise | arg = T; pieces = {0.0, 773.16, 0.3238668+3.754548E-6*T^1+2.213647E-7*T^2-6.565023E-10*T^3+4.21277E-13*T^4+3.170505E-16*T^5}; argunit = K
    KG: KG "Bulk modulus and shear modulus"
      K = kappa(T)
      G = mu(T)
      mu: Piecewise | arg = T; pieces = {0.0, 773.16, 2.894653E10-120032.4*T^1-69037.36*T^2+158.6722*T^3-0.1348974*T^4}; argunit = K; fununit = Pa
      kappa: Piecewise | arg = T; pieces = {0.0, 773.16, 7.252413E10+1872882.0*T^1-71106.44*T^2+52.7109*T^3}; argunit = K; fununit = Pa

Physics
  ht: HeatTransferInSolidsAndFluids on all domains
    dependent variable T
    ShapeProperty.order_temperature = 1
    solid1: SolidHeatTransferModel "Solid 1" (default)
    fluid1: FluidHeatTransferModel "Fluid 1" on no domains
    init1: init "Initial Values 1" (default)
    ins1: ThermalInsulation (default)
    temp1: TemperatureBoundary "Temperature 1" on boundaries 2, 5 | T0 = T_in
    sym1: Symmetry on boundaries 1, 4, 7
    hf1: HeatFluxBoundary "Heat Flux 1" on boundaries 3 | q0_input = q_base
    hf2: HeatFluxBoundary "Heat Flux 2" on boundaries 9
      HeatFluxType = ConvectiveHeatFlux
      HeatTransferCoefficientType = ExtNaturalConvection
      ExtNaturalConvectionType = HorizontalPlateUp
      Ldia = w_ch/2
  spf: LaminarFlow on domains 2
    dependent variable u = {u, v, w}
    PhysicalModelProperty.Compressibility = WeaklyCompressible
    AdvancedSettingProperty.UsePseudoTime = 1
    fp1: FluidProperties (default)
    init1: init "Initial Values 1" (default)
    wallbc1: WallBC "Wall 1" (default)
    inl1: InletBoundary "Inlet 1" on boundaries 5
      BoundaryCondition = FullyDevelopedFlow
      multipleInlets = 0
      Uavfdf = root.u_in
    out1: OutletBoundary "Outlet 1" on boundaries 11 | NormalFlow = 1
    sym1: Symmetry on boundaries 4

Multiphysics
  nitf1: NonIsothermalFlow on all domains | Fluid_physics = spf; Heat_physics = ht

Mesh
  mesh1 "Mesh 1"
    size: MeshSizeDefault
      hmax = 9.5000E-4
      hmin = 1.9380E-5
      hcurve = 0.800
      hnarrow = 0.333
      hgrad = 1.65
      hauto = 7
      custom = on
    bl2: BndLayer "Boundary Layers 2" on boundaries 6, 8, 12
      blp: BndLayerProp "Boundary Layer Properties" on no edges

Studies
  std1 "Study 1"
    stat: Stationary

Solver configurations
  sol1 "Solution 1" (study std1)
    v1: Variables "Dependent Variables 1"
    s1: Stationary "Stationary Solver 1"
      se1: Segregated
        ss1: SegregatedStep "Temperature"
        ss2: SegregatedStep "Velocity u, Pressure p"
        ll1: LowerLimit
      d1: Direct "Direct, heat transfer variables (ht)"
      i1: Iterative "AMG, fluid flow variables (spf)"
        mg1: Multigrid

Datasets
  dset1: Solution | solution = sol1
  surf1: Surface "Exterior Walls" on boundaries 6, 8, 12 | data = dset1
  cln1: CutLine3D | data = dset1; genpoints = {{7.49999E-5, 0.0025, 0}, {7.49999E-5, 0.0025, 4.0E-4}}

Derived values
  av1: AvSurface "Surface Average 1" on boundaries 5 | data = dset1; table = tbl1; expr = spf.pA

Tables
  tbl1: Table
    // Surface Average 1
    Absolute pressure (Pa) | Absolute pressure (Pa) | Absolute pressure (Pa) | Absolute pressure (Pa)
    0 | 103227 | 102279 | 102279

Plots
  pg1: PlotGroup3D "Temperature (ht)" | data = dset1
    vol1: Volume | expr = T
  pg2: PlotGroup3D "Velocity (spf)" | data = dset1
    slc1: Slice | expr = spf.U
  pg3: PlotGroup3D "Pressure (spf)" | data = surf1
    surf1: Surface | expr = p
      tran1: Transparency
  pg4: PlotGroup3D "3D Plot Group 4" | data = dset1
    str1: Streamline | expr = {u, v, w}; udist = 0.015; linetype = tube
      col1: Color "Color Expression 1" | expr = T
  pg5: PlotGroup1D "1D Plot Group 5" | data = cln1
    lngr1: LineGraph | data = cln1; expr = T
  pg6: PlotGroup3D "3D Plot Group 6" | data = dset1
    vol1: Volume | data = dset1; expr = T